*Step, name=Step_deposition, nlgeom=NO, extrapolation=PARABOLIC, inc=100000, unsymm=YES
*Heat Transfer, end=PERIOD, deltmx=1000.
3e-4, 3.266826, 1e-6, 0.05,
*ACTIVATE ELEMENTS , ACTIVATION = "__AM-Model_Material_Source_EPA__"
"ABQ_AM_Table_Collection-Material"
*Output, field, frequency=1
*Node Output
NT
*Output, field, frequency=9999
*Element Output
EACTIVE
*End Step
