*Heading
*Restart, read
** layer 10
*Step, name=Step_dep10, nlgeom=NO, extrapolation=PARABOLIC, inc=100000, unsymm=YES
*Heat Transfer, end=PERIOD, deltmx=1000.
3e-4, 4.644221, 1e-6, 0.05,
*ACTIVATE ELEMENTS , ACTIVATION = "__AM-Model_Material_Source_EPA__"
"ABQ_AM_Table_Collection-Material"
*Output, field, frequency=1
*Node Output
NT
*Output, field, frequency=9999
*Element Output
EACTIVE
*End Step
** track 28
*Step, name=Step_L270, nlgeom=NO, extrapolation=PARABOLIC, inc=100000, unsymm=YES
*Include,input=1_step_local.inp
*Step, name=Step_L271, nlgeom=NO, extrapolation=PARABOLIC, inc=100000, unsymm=YES
*Include,input=1_step_local.inp
*Step, name=Step_L272, nlgeom=NO, extrapolation=PARABOLIC, inc=100000, unsymm=YES
*Include,input=1_step_local.inp
*Step, name=Step_L273, nlgeom=NO, extrapolation=PARABOLIC, inc=100000, unsymm=YES
*Include,input=1_step_local.inp
*Step, name=Step_L274, nlgeom=NO, extrapolation=PARABOLIC, inc=100000, unsymm=YES
*Include,input=1_step_local.inp
*Step, name=Step_L275, nlgeom=NO, extrapolation=PARABOLIC, inc=100000, unsymm=YES
*Include,input=1_step_local.inp
*Step, name=Step_L276, nlgeom=NO, extrapolation=PARABOLIC, inc=100000, unsymm=YES
*Include,input=1_step_local.inp
*Step, name=Step_L277, nlgeom=NO, extrapolation=PARABOLIC, inc=100000, unsymm=YES
*Include,input=1_step_local.inp
*Step, name=Step_L278, nlgeom=NO, extrapolation=PARABOLIC, inc=100000, unsymm=YES
*Include,input=1_step_local.inp
*Step, name=Step_L279, nlgeom=NO, extrapolation=PARABOLIC, inc=100000, unsymm=YES
*Include,input=1_step_local_trackEnd.inp
