*Heading
*Restart, read
** track 30
*Step, name=Step_L290, nlgeom=NO, extrapolation=PARABOLIC, inc=100000, unsymm=YES
*Include,input=1_step_local.inp
*Step, name=Step_L291, nlgeom=NO, extrapolation=PARABOLIC, inc=100000, unsymm=YES
*Include,input=1_step_local.inp
*Step, name=Step_L292, nlgeom=NO, extrapolation=PARABOLIC, inc=100000, unsymm=YES
*Include,input=1_step_local.inp
*Step, name=Step_L293, nlgeom=NO, extrapolation=PARABOLIC, inc=100000, unsymm=YES
*Include,input=1_step_local.inp
*Step, name=Step_L294, nlgeom=NO, extrapolation=PARABOLIC, inc=100000, unsymm=YES
*Include,input=1_step_local.inp
*Step, name=Step_L295, nlgeom=NO, extrapolation=PARABOLIC, inc=100000, unsymm=YES
*Include,input=1_step_local.inp
*Step, name=Step_L296, nlgeom=NO, extrapolation=PARABOLIC, inc=100000, unsymm=YES
*Include,input=1_step_local.inp
*Step, name=Step_L297, nlgeom=NO, extrapolation=PARABOLIC, inc=100000, unsymm=YES
*Include,input=1_step_local.inp
*Step, name=Step_L298, nlgeom=NO, extrapolation=PARABOLIC, inc=100000, unsymm=YES
*Include,input=1_step_local.inp
*Step, name=Step_L299, nlgeom=NO, extrapolation=PARABOLIC, inc=100000, unsymm=YES
*Include,input=1_step_local_trackEnd.inp
** Cooling
*Step, name=Step_last, nlgeom=NO, extrapolation=PARABOLIC, inc=100000, unsymm=YES
*Heat Transfer, end=PERIOD, deltmx=1000.
3e-4, 5, 1e-6, 0.05,
*ACTIVATE ELEMENTS , ACTIVATION = "__AM-Model_Material_Source_EPA__"
"ABQ_AM_Table_Collection-Material"
*Output, field, frequency=1
*Node Output
NT
*Output, field, frequency=9999
*Element Output
EACTIVE
*End Step
